*Heading
** Job name: NoHoles_2_5MMDisp Model name: Model-1
** Generated by: Abaqus/CAE 2021
*Preprint, echo=NO, model=NO, history=NO, contact=NO
**
** PARTS
**
*Part, name=Part-1
*End Part
**
**
** ASSEMBLY
**
*Assembly, name=Assembly
**
*Instance, name=Part-1-1, part=Part-1
*Node
      1,    6.3499999,   19.0499992,   25.3999996
      2,    6.3499999,   18.2880001,   25.3999996
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*Element, type=C3D8RH
    1,   677,   678,   704,   703,     1,     2,    28,    27
    2,   678,   679,   705,   704,     2,     3,    29,    28
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*Nset, nset=Set-1, generate
     1,  23660,      1
*Elset, elset=Set-1, generate
     1,  21250,      1
** Section: Section-1
*Solid Section, elset=Set-1, controls=EC-1, material=Ogden
,
*End Instance
**
*Nset, nset=Set-1, instance=Part-1-1, generate
 22985,  23660,      1
*Elset, elset=Set-1, instance=Part-1-1, generate
 20626,  21250,      1
*Nset, nset=Set-2, instance=Part-1-1, generate
   1,  676,    1
*Elset, elset=Set-2, instance=Part-1-1, generate
   1,  625,    1
*Nset, nset=Set-18, instance=Part-1-1
   1,   2,   3,   4,   5,   6
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*Elset, elset=Set-18, instance=Part-1-1
   1,   2,   3,   4,   5,   6
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*Nset, nset=Set-19, instance=Part-1-1
 22985, 22986, 22987, 22988, 22989, 22990
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*Elset, elset=Set-19, instance=Part-1-1
 20626, 20627, 20628, 20629, 20630, 20631
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*Nset, nset=Set-26, instance=Part-1-1, generate
   1,  676,    1
*Elset, elset=Set-26, instance=Part-1-1, generate
   1,  625,    1
*Nset, nset=Set-27, instance=Part-1-1, generate
 22985,  23660,      1
*Elset, elset=Set-27, instance=Part-1-1, generate
 20626,  21250,      1
*End Assembly
**
** ELEMENT CONTROLS
**
*Section Controls, name=EC-1, hourglass=ENHANCED
1., 1., 1.
**
** MATERIALS
**
*Material, name=Ogden
*Hyperelastic, n=3, ogden
 0.4017,     1.3, 0.00295,      5., 0.00981,     -2.,      0.,      0.
      0.,
** ----------------------------------------------------------------
**
** STEP: Step-1
**
*Step, name=Step-1, nlgeom=YES
*Static
0.1, 1., 1e-05, 1.
**
** BOUNDARY CONDITIONS
**
** Name: BC-1 Type: Displacement/Rotation
*Boundary
Set-26, 1, 1
Set-26, 2, 2
Set-26, 3, 3, 2.5
Set-26, 4, 4
Set-26, 5, 5
Set-26, 6, 6
** Name: BC-2 Type: Symmetry/Antisymmetry/Encastre
*Boundary
Set-27, ENCASTRE
**
** OUTPUT REQUESTS
**
*Restart, write, frequency=0
**
** FIELD OUTPUT: F-Output-1
**
*Output, field, variable=PRESELECT
**
** HISTORY OUTPUT: H-Output-1
**
*Output, history, variable=PRESELECT
*End Step
