*Heading
** Job name: sq-6.0004mm_sin-per-3_sin-amp-0.60718mm_tet_test Model name: Model-1
** Generated by: Abaqus/CAE 2021
*Preprint, echo=NO, model=NO, history=NO, contact=NO
**
** PARTS
**
*Part, name=Part-1
*End Part
**
**
** ASSEMBLY
**
*Assembly, name=Assembly
**
*Instance, name=Part-1-1, part=Part-1
*Node
1, -20, 3.0002, 0
2, -19.6491, 3.1001, 0
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*Element, type=C3D10H
1, 3786, 2918, 2905, 3792, 4210, 4208, 4209, 4211, 4212, 4213
2, 2848, 4199, 3872, 4114, 4216, 4214, 4215, 4217, 4218, 4219
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*Nset, nset=Set-1, generate
1, 27217, 1
*Elset, elset=Set-1, generate
1, 16016, 1
** Section: Section-1
*Solid Section, elset=Set-1, controls=EC-1, material=Material-1
,
*End Instance
**
*Nset, nset=bc-set-1, instance=Part-1-1
1, 2, 3, 4, 5, 6
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*Elset, elset=bc-set-1, instance=Part-1-1
12, 18, 85, 106, 133, 158
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*Nset, nset=bc-set-2, instance=Part-1-1
111, 112, 113, 114, 115, 116
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*Elset, elset=bc-set-2, instance=Part-1-1
3, 101, 180, 182, 194, 201
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*End Assembly
**
** ELEMENT CONTROLS
**
*Section Controls, name=EC-1, hourglass=ENHANCED
1., 1., 1.
**
** MATERIALS
**
*Material, name=Material-1
*Hyperelastic, n=3, ogden
0.4017, 1.3, 0.00295, 5, 0.00981, -2, 0, 0
0,
** ----------------------------------------------------------------
**
** STEP: Step-1
**
*Step, name=Step-1, nlgeom=YES
*Static
1., 1., 1e-05, 1.
**
** BOUNDARY CONDITIONS
**
** Name: BC-1 Type: Displacement/Rotation
*Boundary
bc-set-1, 1, 1, 3
bc-set-1, 2, 6
** Name: BC-2 Type: Symmetry/Antisymmetry/Encastre
*Boundary
bc-set-2, ENCASTRE
**
** OUTPUT REQUESTS
**
*Restart, write, frequency=0
**
** FIELD OUTPUT: F-Output-1
**
*Output, field, variable=PRESELECT
**
** HISTORY OUTPUT: H-Output-1
**
*Output, history, variable=PRESELECT
*NODE PRINT
U
*EL PRINT, position = centroidal
DG
*EL PRINT, elset = bc-set-1, position = centroidal
S12
*EL PRINT, elset = bc-set-2, position = centroidal
S12
*End Step
